# OpenSim document version 40500
ScaleTool ToyLandingModel_scaled:
  mass: 70
  height: 1820
  age: 22
  notes: setup file for scaling ToyLandingModel
  GenericModelMaker:
    model_file: ToyLandingModel.osim
  ModelScaler:
    apply: true
    scaling_order: manualScale
    preserve_mass_distribution: true
    output_model_file: ToyLandingModel_scaled.osim
    output_scale_file: ToyLandingModel_scaleSet_applied.xml
    ScaleSet:
      Scale: scales=(1.1 1.1 1.1) segment=bone apply=true
      Scale: scales=(1.1 1.1 1.1) segment=bone2 apply=true
