# OpenSim document version 40500
CMC_TaskSet:
  CMC_Joint [values shared by the 11 below unless stated]: weight=(1 1 1) active=(false false false) kp=(1 1 1)
      kv=(0.5 0.5 0.5) ka=(1 1 1) r0=(0 0 0) r1=(0 0 0) r2=(0 0 0) limit=0
  CMC_Joint SC_y: coordinate=SC_y
  CMC_Joint SC_z: coordinate=SC_z
  CMC_Joint SC_x: coordinate=SC_x
  CMC_Joint AC_y: coordinate=AC_y
  CMC_Joint AC_z: coordinate=AC_z
  CMC_Joint AC_x: coordinate=AC_x
  CMC_Joint GH_y: coordinate=GH_y
  CMC_Joint GH_z: coordinate=GH_z
  CMC_Joint GH_yy: coordinate=GH_yy
  CMC_Joint EL_x: coordinate=EL_x
  CMC_Joint PS_y: coordinate=PS_y
