# OpenSim document version 30000
ForceSet gait10dof_Reserve_Actuators:
  # Actuators on the Coordinates are called Reserve actuators
  # and are used the drive the model when the model excludes its muscles (i.e. RRA)
  # or when muscles are insufficient to track desired kinematics (CMC)
  CoordinateActuator elv_angle_reserve: coordinate=elv_angle optimal_force=10
  CoordinateActuator shoulder_elv_reserve: coordinate=shoulder_elv optimal_force=10
  CoordinateActuator shoulder_rot_reserve: coordinate=shoulder_rot optimal_force=10
  CoordinateActuator elbow_flexion_reserve: coordinate=elbow_flexion optimal_force=10
  CoordinateActuator pro_sup_reserve: coordinate=pro_sup optimal_force=10
  CoordinateActuator deviation_reserve: coordinate=deviation optimal_force=10
  CoordinateActuator flexion_reserve: coordinate=flexion optimal_force=10
