# OpenSim document version 40500
ControlSet Control Set:
  ControlLinear [values shared by the 7 below unless stated]: is_model_control=true extrapolate=true default_min=0.02
      default_max=1 filter_on=false use_steps=false kp=100 kv=20
  ControlLinear elv_angle_reserve:
    x_nodes:
      ControlLinearNode: t=0 value=0.001053264
      ControlLinearNode: t=0.01 value=0.001053264
  ControlLinear shoulder_elv_reserve:
    x_nodes:
      ControlLinearNode: t=0 value=0.004084956
      ControlLinearNode: t=0.01 value=0.004084956
  ControlLinear shoulder_rot_reserve:
    x_nodes:
      ControlLinearNode: t=0 value=-0.004863553
      ControlLinearNode: t=0.01 value=-0.004863553
  ControlLinear elbow_flexion_reserve:
    x_nodes:
      ControlLinearNode: t=0 value=-0.002597788
      ControlLinearNode: t=0.01 value=-0.002597788
  ControlLinear pro_sup_reserve:
    x_nodes:
      ControlLinearNode: t=0 value=-0.0002807631
      ControlLinearNode: t=0.01 value=-0.0002807631
  ControlLinear deviation_reserve:
    x_nodes:
      ControlLinearNode: t=0 value=0.0003073707
      ControlLinearNode: t=0.01 value=0.0003073707
  ControlLinear flexion_reserve:
    x_nodes:
      ControlLinearNode: t=0 value=-0.0001269956
      ControlLinearNode: t=0.01 value=-0.0001269956
