# OpenSim document version 40500
ControlSet Control Set:
  ControlLinear [values shared by the 20 below unless stated]: is_model_control=true extrapolate=true default_min=0.02
      default_max=1 filter_on=false use_steps=false kp=100 kv=20
  ControlLinear sternoclavicular_r2_reserve:
    x_nodes:
      ControlLinearNode: t=0 value=-0.04390289
      ControlLinearNode: t=0.01 value=-0.04390289
  ControlLinear sternoclavicular_r3_reserve:
    x_nodes:
      ControlLinearNode: t=0 value=0.01859519
      ControlLinearNode: t=0.01 value=0.01859519
  ControlLinear unrotscap_r3_reserve:
    x_nodes:
      ControlLinearNode: t=0 value=-0.01859519
      ControlLinearNode: t=0.01 value=-0.01859519
  ControlLinear unrotscap_r2_reserve:
    x_nodes:
      ControlLinearNode: t=0 value=0.04390289
      ControlLinearNode: t=0.01 value=0.04390289
  ControlLinear acromioclavicular_r2_reserve:
    x_nodes:
      ControlLinearNode: t=0 value=-0.008889443
      ControlLinearNode: t=0.01 value=-0.008889443
  ControlLinear acromioclavicular_r3_reserve:
    x_nodes:
      ControlLinearNode: t=0 value=0.07184135
      ControlLinearNode: t=0.01 value=0.07184135
  ControlLinear acromioclavicular_r1_reserve:
    x_nodes:
      ControlLinearNode: t=0 value=0.03229219
      ControlLinearNode: t=0.01 value=0.03229219
  ControlLinear unrothum_r1_reserve:
    x_nodes:
      ControlLinearNode: t=0 value=-0.03229219
      ControlLinearNode: t=0.01 value=-0.03229219
  ControlLinear unrothum_r3_reserve:
    x_nodes:
      ControlLinearNode: t=0 value=-0.07184135
      ControlLinearNode: t=0.01 value=-0.07184135
  ControlLinear unrothum_r2_reserve:
    x_nodes:
      ControlLinearNode: t=0 value=0.008889443
      ControlLinearNode: t=0.01 value=0.008889443
  ControlLinear elv_angle_reserve:
    x_nodes:
      ControlLinearNode: t=0 value=0.08191828
      ControlLinearNode: t=0.01 value=0.08191828
  ControlLinear shoulder_elv_reserve:
    x_nodes:
      ControlLinearNode: t=0 value=0.1814165
      ControlLinearNode: t=0.01 value=0.1814165
  ControlLinear shoulder1_r2_reserve:
    x_nodes:
      ControlLinearNode: t=0 value=-0.08191828
      ControlLinearNode: t=0.01 value=-0.08191828
  ControlLinear shoulder_rot_reserve:
    x_nodes:
      ControlLinearNode: t=0 value=-0.1601088
      ControlLinearNode: t=0.01 value=-0.1601088
  ControlLinear elbow_flexion_reserve:
    x_nodes:
      ControlLinearNode: t=0 value=0.2871219
      ControlLinearNode: t=0.01 value=0.2871219
  ControlLinear pro_sup_reserve:
    x_nodes:
      ControlLinearNode: t=0 value=-0.02277788
      ControlLinearNode: t=0.01 value=-0.02277788
  ControlLinear deviation_reserve:
    x_nodes:
      ControlLinearNode: t=0 value=-0.006533602
      ControlLinearNode: t=0.01 value=-0.006533602
  ControlLinear flexion_reserve:
    x_nodes:
      ControlLinearNode: t=0 value=-0.006265406
      ControlLinearNode: t=0.01 value=-0.006265406
  ControlLinear wrist_hand_r1_reserve:
    x_nodes:
      ControlLinearNode: t=0 value=-0.008867018
      ControlLinearNode: t=0.01 value=-0.008867018
  ControlLinear wrist_hand_r3_reserve:
    x_nodes:
      ControlLinearNode: t=0 value=-0.003132703
      ControlLinearNode: t=0.01 value=-0.003132703
