# OpenSim document version 40500
AnalyzeTool Right:
  model_file: MOBL_ARMS.osim
  replace_force_set: true
  force_set_files: Stat_op/Mobl_arms_Actuators.xml
  results_directory: .
  output_precision: 8
  initial_time: 0
  final_time: 3
  solve_for_equilibrium_for_auxiliary_states: false
  maximum_number_of_integrator_steps: 20000
  maximum_integrator_step_size: 1
  minimum_integrator_step_size: 1e-8
  integrator_error_tolerance: 1e-5
  external_loads_file: Forward_dynamics/Right_forces.xml
  coordinates_file: Stationary_kinematics/Mobl_static_kinematics_elv_angle_-38.3_shoulder_elv_31.3_elbow_flexion_97.7.mot
  lowpass_cutoff_frequency_for_coordinates: -1
  AnalysisSet Analyses:
    StaticOptimization: start_time=0 end_time=3 step_interval=1 in_degrees=true use_model_force_set=true
        activation_exponent=2 use_muscle_physiology=true optimizer_convergence_criterion=0.0001
        optimizer_max_iterations=100
