# OpenSim document version 40500
ControlSet Control Set:
  ControlLinear rot_coord0_reserve: is_model_control=true extrapolate=true default_min=0.02 default_max=1
      filter_on=false use_steps=false kp=100 kv=20
    x_nodes:
      ControlLinearNode: t=0 value=-8.75
      ControlLinearNode: t=1 value=-8.75
  ControlLinear rot_coord1_reserve: is_model_control=true extrapolate=true default_min=0.02 default_max=1
      filter_on=false use_steps=false kp=100 kv=20
    x_nodes:
      ControlLinearNode: t=0 value=-1.25
      ControlLinearNode: t=1 value=-1.25
