# OpenSim document version 40500
ControlSet Control Set:
  ControlLinear rot_coord_0_reserve: is_model_control=true extrapolate=true default_min=0.02 default_max=1
      filter_on=false use_steps=false kp=100 kv=20
    x_nodes:
      ControlLinearNode: t=0 value=-5.625
      ControlLinearNode: t=0.01 value=-5.625
  ControlLinear rot_coord_1_reserve: is_model_control=true extrapolate=true default_min=0.02 default_max=1
      filter_on=false use_steps=false kp=100 kv=20
    x_nodes:
      ControlLinearNode: t=0 value=-0.625
      ControlLinearNode: t=0.01 value=-0.625
