# OpenSim document version 40500
Model:
  gravity: 4 0 0
  Ground
  BodySet:
    Body wall: mass=0 [kg] mass_center=(0 0 0) inertia=(0 0 0 0 0 0)
      PhysicalOffsetFrame wallCenter: socket_parent=.. translation=(0 0 0) [meters]
        Ellipsoid wallCenter_geom_1: radii=(0.5 0.1 0.1)
    Body arm: mass=10 mass_center=(0 0 0) inertia=(0 0 0 0 0 0)
      PhysicalOffsetFrame armCenter: socket_parent=.. translation=(0 0 0)
        Ellipsoid armCenter_geom_1: radii=(0.1 0.1 0.5)
    Body arm2: mass=10 mass_center=(0 0 0) inertia=(0 0 0 0 0 0)
      PhysicalOffsetFrame arm2Center: socket_parent=.. translation=(0 0 0)
        Ellipsoid armCenter_geom_1: radii=(0.1 0.1 0.25)
      WrapCylinder wrap: xyz_body_rotation=(1.5707 0 0) translation=(0 0 0.25) quadrant=all radius=0.1 length=0.2
  JointSet:
    WeldJoint wall_hold: socket_parent_frame=ground_offset socket_child_frame=wall_offset
      PhysicalOffsetFrame ground_offset: socket_parent=/ground translation=(0 1 0)
      PhysicalOffsetFrame wall_offset: socket_parent=/bodyset/wall translation=(0 0 0)
    PinJoint pin: socket_parent_frame=wall_offset socket_child_frame=arm_offset
      Coordinate rot_coord_0: default_value=0 range=(-1.3 1.3)
      PhysicalOffsetFrame wall_offset: socket_parent=/bodyset/wall translation=(0 0 0)
          orientation=(1.5707 0 0) [radians]
      PhysicalOffsetFrame arm_offset: socket_parent=/bodyset/arm translation=(0 0 0.5) orientation=(1.5707 0 0)
    PinJoint pin2: socket_parent_frame=arm_offset socket_child_frame=arm2_offset
      Coordinate rot_coord_1: default_value=0 range=(-1.3 1.3)
      PhysicalOffsetFrame arm_offset: socket_parent=/bodyset/arm translation=(0 0 -0.5) orientation=(1.5707 0 0)
      PhysicalOffsetFrame arm2_offset: socket_parent=/bodyset/arm2 translation=(0 0 0.25) orientation=(1.5707 0 0)
  ConstraintSet:
    CoordinateCouplerConstraint pin2con: independent_coordinate_names=rot_coord_0 dependent_coordinate_name=rot_coord_1
        scale_factor=1
      coupled_coordinates_function: SimmSpline: x=(0 1) y=(0 -1)
  ForceSet:
    Millard2012EquilibriumMuscle muscle1: min_control=0.01 max_control=1 max_isometric_force=500
        optimal_fiber_length=0.33 tendon_slack_length=0.15 pennation_angle_at_optimal=0 [radians]
      PathPoint origin: wall (-0.5 0 0)
      PathPoint insertion: arm (-0.09 0 0.25)
      ActiveForceLengthCurve: minimum_value=0
      ForceVelocityCurve: concentric_slope_at_vmax=0 concentric_slope_near_vmax=0.25 isometric_slope=5
          eccentric_slope_at_vmax=0 eccentric_slope_near_vmax=0.15 max_eccentric_velocity_force_multiplier=1.4
      FiberForceLengthCurve
      TendonForceLengthCurve
    Millard2012EquilibriumMuscle muscle2: min_control=0.01 max_control=1 max_isometric_force=500
        optimal_fiber_length=0.33 tendon_slack_length=0.15 pennation_angle_at_optimal=0
      PathPoint origin: wall (0.5 0 0)
      PathPoint insertion: arm (0.09 0 0.25)
      ActiveForceLengthCurve: minimum_value=0
      ForceVelocityCurve: concentric_slope_at_vmax=0 concentric_slope_near_vmax=0.25 isometric_slope=5
          eccentric_slope_at_vmax=0 eccentric_slope_near_vmax=0.15 max_eccentric_velocity_force_multiplier=1.4
      FiberForceLengthCurve
      TendonForceLengthCurve
    Millard2012EquilibriumMuscle muscle3: min_control=0.01 max_control=1 max_isometric_force=500
        optimal_fiber_length=0.6 tendon_slack_length=0.15 pennation_angle_at_optimal=0
      PathPoint origin: arm (0.15 0 0)
      PathPoint P2: armCenter (0.15 0 -0.4)
      PathPoint insertion: arm2 (0.15 0 0)
      PathWrap: wrap_object=wrap method=hybrid range=(1 3)
      ActiveForceLengthCurve: minimum_value=0
      ForceVelocityCurve: concentric_slope_at_vmax=0 concentric_slope_near_vmax=0.25 isometric_slope=5
          eccentric_slope_at_vmax=0 eccentric_slope_near_vmax=0.15 max_eccentric_velocity_force_multiplier=1.4
      FiberForceLengthCurve
      TendonForceLengthCurve
    Millard2012EquilibriumMuscle muscle4: min_control=0.01 max_control=1 max_isometric_force=500
        optimal_fiber_length=0.6 tendon_slack_length=0.15 pennation_angle_at_optimal=0
      PathPoint origin: arm (-0.15 0 0)
      PathPoint muscle3-P2: armCenter (-0.15 0 -0.4)
      PathPoint insertion: arm2 (-0.15 0 0)
      PathWrap: wrap_object=wrap method=hybrid range=(1 3)
      ActiveForceLengthCurve: minimum_value=0
      ForceVelocityCurve: concentric_slope_at_vmax=0 concentric_slope_near_vmax=0.25 isometric_slope=5
          eccentric_slope_at_vmax=0 eccentric_slope_near_vmax=0.15 max_eccentric_velocity_force_multiplier=1.4
      FiberForceLengthCurve
      TendonForceLengthCurve
