# OpenSim document version 40500
Model BUET:
  gravity: 0 -9.80665 0
  length_units: meters
  force_units: N
  credits:
    Delp S.L., Loan J.P., Hoy M.G., Zajac F.E., Topp E.L., Rosen J.M., Thelen D.G., Anderson F.C., Seth A., Hamner S.R., Arnold E., Raabe M.E.
  publications:
    Notes: Raabe Full Body model combines Hamner Full Body Model 2010, Christophy 2012 Lumbar DOF torso, and Arnold patella; 3D, 23 DOF gait model created by D.G. Thelen, Univ. of Wisconsin-Madison, and Samuel Hamner, Ajay Seth, Frank C. Anderson, and Scott L. Delp, Stanford University. Lower extremity joint defintions based on Delp et al. (1990). Low back joint and anthropometry based on Anderson and Pandy (1999, 2001). Planar knee model of Yamaguchi and Zajac (1989). Hamner added arms adapted from Holzbaur et al., 2005. Hamner, S.R., Seth, A, Delp, S.L.: Muscle contributions to propulsion and support during running. Journal of Biomechanics, 2010. Delp, S.L., Loan, J.P., Hoy, M.G., Zajac, F.E., Topp E.L., Rosen, J.M.: An interactive graphics-based model of the lower extremity to study orthopaedic surgical procedures, IEEE Transactions on Biomedical Engineering, vol. 37, pp. 757-767, 1990. Yamaguchi G.T., Zajac F.E.: A planar model of the knee joint to characterize the knee extensor mechanism." J . Biomech. vol. 21. pp. 1-10. 1989. Anderson F.C., Pandy M.G.: A dynamic optimization solution for vertical jumping in three dimensions. Computer Methods in Biomechanics and Biomedical Engineering 2:201-231, 1999. Anderson F.C., Pandy M.G.: Dynamic optimization of human walking. Journal of Biomechanical Engineering 123:381-390, 2001. Holzbaur, KR, WM Murray and SL Delp, 2005. A model of the upper extremity for simulating musculoskeletal surgery and analyzing neuromuscular control. Ann Biomed Eng 33(6): 829-840.
  defaults: Thelen2003Muscle default: max_isometric_force=546 optimal_fiber_length=0.0535 tendon_slack_length=0.078
      pennation_angle_at_optimal=0 [radians] FmaxTendonStrain=0.033 FmaxMuscleStrain=0.6 KshapeActive=0.5
      KshapePassive=4 Af=0.3 Flen=1.8 activation_time_constant=0.01 [seconds] deactivation_time_constant=0.04 [seconds]
  Ground
  BodySet:
    Body sacrum: mass=0 [kg] mass_center=(0 0 0) inertia=(0 0 0 0 0 0) meshes=sacrum.vtp
    Body lumbar5: mass=1.824 mass_center=(0.01728 0.0183 0) inertia=(0.178216 0.0217274 0.171486 0 0 0)
        meshes=lumbar5.vtp
    Body lumbar4: mass=1.799 mass_center=(0.0186 0.0217953 0) inertia=(0.171208 0.0206792 0.165178 0 0 0)
        meshes=lumbar4.vtp
    Body lumbar3: mass=1.67 mass_center=(0.0178939 0.0232739 0) inertia=(0.157697 0.0199107 0.152447 0 0 0)
        meshes=lumbar3.vtp
    Body lumbar2: mass=1.689 mass_center=(0.0252462 0.0202124 0) inertia=(0.162705 0.0219751 0.157705 0 0 0)
        meshes=lumbar2.vtp
    Body lumbar1: mass=1.677 mass_center=(0.03274 0.0194073 0.00132891) inertia=(0.162657 0.0241312 0.157927 0 0 0)
        meshes=lumbar1.vtp
    Body torso: mass=16.78486 mass_center=(-0.03 0.32 0) inertia=(1.19239 0.513346 1.1632 0 0 0)
        meshes=(cerv1sm.vtp cerv2sm.vtp cerv3sm.vtp cerv4sm.vtp cerv5sm.vtp cerv6sm.vtp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)
      WrapCylinder Cylinder: translation=(-0.208 0.04 0) quadrant=all radius=0.17 length=0.26
      WrapEllipsoid Chest_r: xyz_body_rotation=(0 -0.4 0.2) translation=(0 0.21 0.01) quadrant=z
          dimensions=(0.075 0.17 0.13)
      WrapEllipsoid Chest_l: xyz_body_rotation=(0 0.4 0.2) translation=(0 0.21 -0.01) quadrant=-z
          dimensions=(0.075 0.17 0.13)
      WrapEllipsoid Chest_pect: xyz_body_rotation=(0 0 0.35) translation=(0.013 0.25 0) quadrant=all
          dimensions=(0.075 0.17 0.136)
    Body clavicle_1: mass=0 mass_center=(0 0 0) inertia=(0 0 0 0 0 0)
    Body clavicle_2: mass=0 mass_center=(0 0 0) inertia=(0 0 0 0 0 0)
    Body clavicle_r: mass=0.1897729 mass_center=(-0.01110064 0.006371761 0.05417029)
        inertia=(0.0002676737 0.0002676737 4.901324e-5 -2.094264e-5 -7.717231e-5 5.926065e-5) meshes=clavicle.vtp
    Body scapula_1: mass=0 mass_center=(0 0 0) inertia=(0 0 0 0 0 0)
    Body scapula_2: mass=0 mass_center=(0 0 0) inertia=(0 0 0 0 0 0)
    Body scapula_r: mass=0.5015989 mass_center=(-0.05468973 -0.03503135 -0.04371461)
        inertia=(0.0008856693 0.0008193404 0.0008856693 0.0003202001 0.0002915427 0.0001717929) meshes=scapula.vtp
      WrapCylinder delt_ant: translation=(-0.0146552 -0.0400202 -0.02616044) quadrant=x radius=0.011 length=0.06
    Body humerus_r: mass=2.0325 mass_center=(0 -0.164502 0) inertia=(0.011946 0.004121 0.013409 0 0 0)
        meshes=humerus_rv.vtp
      WrapSphere deltoid: xyz_body_rotation=(-0.193033 -0.238063 0) translation=(0.0065 -0.0009 -0.0038) quadrant=all
          radius=0.0262
      WrapSphere inf_sup_sub: xyz_body_rotation=(-0.193033 -0.238063 0) translation=(0.0055 0.0018 -0.0081)
          quadrant=all radius=0.0211
      WrapCylinder infra_cyl: xyz_body_rotation=(1.56643 0.00610865 0) translation=(0.0094 -0.023 -0.002) quadrant=-x
          radius=0.015 length=0.11
      WrapCylinder ter_min_cyl: xyz_body_rotation=(1.56643 0.00610865 -1.47672) translation=(0.0011 -0.023 0)
          quadrant=-y radius=0.015 length=0.1
      WrapCylinder ter_lat_pec: xyz_body_rotation=(1.56643 0.00610865 0) translation=(0.01204 -0.053 0) quadrant=all
          radius=0.008 length=0.1
    Body ulna_r: mass=0.6075 mass_center=(0 -0.120525 0) inertia=(0.002962 0.000618 0.003213 0 0 0) meshes=ulna_rv.vtp
      WrapCylinder elbow: translation=(-0.004 -0.0045 0.0099) quadrant=y radius=0.019 length=0.048
      WrapCylinder elbow_circ: translation=(-0.015 -0.0045 0.0099) quadrant=all radius=0.015 length=0.048
    Body radius_r: mass=0.6075 mass_center=(0 -0.120525 0) inertia=(0.002962 0.000618 0.003213 0 0 0)
        meshes=radius_rv.vtp
      WrapCylinder supinator: xyz_body_rotation=(-1.78 0 -0.5) translation=(-0.0023 -0.1196 0.023) quadrant=-y
          radius=0.007 length=0.25
      WrapCylinder ulna_radius: xyz_body_rotation=(1.4 0 3) translation=(-0.002 -0.089 0.014) quadrant=-x radius=0.0071
          length=0.06
      WrapCylinder supinator2: xyz_body_rotation=(-3 1.58 3) translation=(-0.001 -0.0035 0.003) quadrant=-x
          radius=0.006 length=0.02
      WrapCylinder supinator3: xyz_body_rotation=(-1 -1.58 2) translation=(-0.001 -0.0035 0.003) quadrant=-x
          radius=0.006 length=0.02
    Body hand_r: mass=0.4575 mass_center=(0 -0.068095 0) inertia=(0.000892 0.000547 0.00134 0 0 0)
        meshes=(pisiform_rvs.vtp lunate_rvs.vtp scaphoid_rvs.vtp triquetrum_rvs.vtp hamate_rvs.vtp capitate_rvs.vtp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)
  JointSet:
    WeldJoint ground_torso: socket_parent_frame=ground_offset socket_child_frame=torso_offset
      PhysicalOffsetFrame ground_offset: socket_parent=/ground translation=(0 0 0) [meters]
      PhysicalOffsetFrame torso_offset: socket_parent=/bodyset/torso translation=(0 -1 0)
    WeldJoint L5_S1_IVDjnt: socket_parent_frame=sacrum_offset socket_child_frame=lumbar5_offset
      PhysicalOffsetFrame sacrum_offset: socket_parent=/bodyset/sacrum translation=(-0.098 0.071 0)
      PhysicalOffsetFrame lumbar5_offset: socket_parent=/bodyset/lumbar5 translation=(0 0 0)
    WeldJoint L4_L5_IVDjnt: socket_parent_frame=lumbar5_offset socket_child_frame=lumbar4_offset
      PhysicalOffsetFrame lumbar5_offset: socket_parent=/bodyset/lumbar5 translation=(0.01 0.0296 0)
      PhysicalOffsetFrame lumbar4_offset: socket_parent=/bodyset/lumbar4 translation=(0.001 -0.0025 0)
    WeldJoint L3_L4_IVDjnt: socket_parent_frame=lumbar4_offset socket_child_frame=lumbar3_offset
      PhysicalOffsetFrame lumbar4_offset: socket_parent=/bodyset/lumbar4 translation=(0 0.032 0)
      PhysicalOffsetFrame lumbar3_offset: socket_parent=/bodyset/lumbar3 translation=(-0.0006 -0.0012 0)
    WeldJoint L2_L3_IVD_jnt: socket_parent_frame=lumbar3_offset socket_child_frame=lumbar2_offset
      PhysicalOffsetFrame lumbar3_offset: socket_parent=/bodyset/lumbar3 translation=(-0.008 0.0312 0)
      PhysicalOffsetFrame lumbar2_offset: socket_parent=/bodyset/lumbar2 translation=(-0.0013 -0.0039 0)
    WeldJoint L1_L2_IVD_jnt: socket_parent_frame=lumbar2_offset socket_child_frame=lumbar1_offset
      PhysicalOffsetFrame lumbar2_offset: socket_parent=/bodyset/lumbar2 translation=(-0.01 0.025 0)
      PhysicalOffsetFrame lumbar1_offset: socket_parent=/bodyset/lumbar1 translation=(0.0014 -0.0038 0)
    WeldJoint Torsojnt: socket_parent_frame=lumbar1_offset socket_child_frame=torso_offset
      PhysicalOffsetFrame lumbar1_offset: socket_parent=/bodyset/lumbar1 translation=(0.0025 -0.09 0)
      PhysicalOffsetFrame torso_offset: socket_parent=/bodyset/torso translation=(0 0 0)
    CustomJoint sc1: socket_parent_frame=torso_offset socket_child_frame=clavicle_1_offset
      Coordinate SC_y: default_value=0 range=(-0.5235988 0.5235988) clamped=true locked=true
      PhysicalOffsetFrame torso_offset: socket_parent=/bodyset/torso translation=(0.0365312 0.377931 0.025465)
      PhysicalOffsetFrame clavicle_1_offset: socket_parent=/bodyset/clavicle_1 translation=(0 0 0)
      SpatialTransform: axes_held_at_zero=(rotation2 rotation3 translation1 translation2 translation3)
        TransformAxis rotation1: coordinates=SC_y axis=(0 1 0) LinearFunction(coefficients=1 0)
    CustomJoint sc2: socket_parent_frame=clavicle_1_offset socket_child_frame=clavicle_2_offset
      Coordinate SC_x: default_value=0 range=(-0.7853982 0.1745329) clamped=true locked=true
      PhysicalOffsetFrame clavicle_1_offset: socket_parent=/bodyset/clavicle_1 translation=(0 0 0)
      PhysicalOffsetFrame clavicle_2_offset: socket_parent=/bodyset/clavicle_2 translation=(0 0 0)
      SpatialTransform: axes_held_at_zero=(rotation1 rotation2 translation1 translation2 translation3)
        TransformAxis rotation3: coordinates=SC_x axis=(0.0873 0 0) LinearFunction(coefficients=1 0)
    CustomJoint sc3: socket_parent_frame=clavicle_2_offset socket_child_frame=clavicle_r_offset
      Coordinate SC_z: default_value=0 range=(0 0.6108652) clamped=true locked=true
      PhysicalOffsetFrame clavicle_2_offset: socket_parent=/bodyset/clavicle_2 translation=(0 0 0)
      PhysicalOffsetFrame clavicle_r_offset: socket_parent=/bodyset/clavicle_r translation=(0 0 0)
      SpatialTransform: axes_held_at_zero=(rotation1 rotation3 translation1 translation2 translation3)
        TransformAxis rotation2: coordinates=SC_z axis=(0.0873 0 0.5744638) LinearFunction(coefficients=1 0)
    WeldJoint AC1: socket_parent_frame=clavicle_r_offset socket_child_frame=scapula_1_offset
      PhysicalOffsetFrame clavicle_r_offset: socket_parent=/bodyset/clavicle_r translation=(-0.01433 0.02007 0.135535)
      PhysicalOffsetFrame scapula_1_offset: socket_parent=/bodyset/scapula_1 translation=(0 0 0)
    WeldJoint AC2: socket_parent_frame=scapula_1_offset socket_child_frame=scapula_2_offset
      PhysicalOffsetFrame scapula_1_offset: socket_parent=/bodyset/scapula_1 translation=(0 0 0)
      PhysicalOffsetFrame scapula_2_offset: socket_parent=/bodyset/scapula_2 translation=(0 0 0)
    WeldJoint AC3: socket_parent_frame=scapula_2_offset socket_child_frame=scapula_r_offset
      PhysicalOffsetFrame scapula_2_offset: socket_parent=/bodyset/scapula_2 translation=(0 0 0)
      PhysicalOffsetFrame scapula_r_offset: socket_parent=/bodyset/scapula_r translation=(0 0 0)
    CustomJoint acromial_r: socket_parent_frame=scapula_r_offset socket_child_frame=humerus_r_offset
      Coordinate arm_flex_r: default_value=1.734409e-10 range=(-1.570796 3.141593) clamped=true
      Coordinate arm_add_r: default_value=-7.840796e-11 range=(-2.094395 1.570796) clamped=true
      Coordinate arm_rot_r: default_value=0 range=(-1.570796 1.570796) clamped=true
      PhysicalOffsetFrame scapula_r_offset: socket_parent=/bodyset/scapula_r
          translation=(-0.0266552 -0.0400202 0.00383956)
      PhysicalOffsetFrame humerus_r_offset: socket_parent=/bodyset/humerus_r translation=(0 0 0)
      SpatialTransform: axes_held_at_zero=(translation1 translation2 translation3)
        TransformAxis rotation1: coordinates=arm_flex_r axis=(0 0 1) LinearFunction(coefficients=1 0)
        TransformAxis rotation2: coordinates=arm_add_r axis=(1 0 0) LinearFunction(coefficients=1 0)
        TransformAxis rotation3: coordinates=arm_rot_r axis=(0 1 0) LinearFunction(coefficients=1 0)
    CustomJoint elbow_r: socket_parent_frame=humerus_r_offset socket_child_frame=ulna_r_offset
      Coordinate elbow_flex_r: default_value=3.356478e-5 range=(0 2.618) clamped=true
      PhysicalOffsetFrame humerus_r_offset: socket_parent=/bodyset/humerus_r translation=(0.013144 -0.286273 -0.009595)
      PhysicalOffsetFrame ulna_r_offset: socket_parent=/bodyset/ulna_r translation=(0 0 0)
      SpatialTransform: axes_held_at_zero=(rotation2 rotation3 translation1 translation2 translation3)
        TransformAxis rotation1: coordinates=elbow_flex_r axis=(0.226047 0.022269 0.9738618)
            LinearFunction(coefficients=1 0)
    CustomJoint radioulnar_r: socket_parent_frame=ulna_r_offset socket_child_frame=radius_r_offset
      Coordinate pro_sup_r: default_value=0 range=(0 1.570796) clamped=true locked=true
      PhysicalOffsetFrame ulna_r_offset: socket_parent=/bodyset/ulna_r translation=(-0.006727 -0.013007 0.026083)
      PhysicalOffsetFrame radius_r_offset: socket_parent=/bodyset/radius_r translation=(0 0 0)
      SpatialTransform: axes_held_at_zero=(rotation2 rotation3 translation1 translation2 translation3)
        TransformAxis rotation1: coordinates=pro_sup_r axis=(0.05639803 0.9984065 0.001952)
            LinearFunction(coefficients=1 0)
    WeldJoint radius_hand_r: socket_parent_frame=radius_r_offset socket_child_frame=hand_r_offset
      PhysicalOffsetFrame radius_r_offset: socket_parent=/bodyset/radius_r translation=(-0.008797 -0.235841 0.01361)
      PhysicalOffsetFrame hand_r_offset: socket_parent=/bodyset/hand_r translation=(0 0 0)
  ForceSet:
    Thelen2003Muscle delt_scap_1: max_isometric_force=289 optimal_fiber_length=0.1128 tendon_slack_length=0.08
        pennation_angle_at_optimal=0.08726646
      PathPoint P1: scapula_r (-0.0774343 -0.01207359 -0.05538443)
      PathPoint P2: scapula_r (-0.0671888 -0.0558577 -0.0279543)
      PathPoint P3: humerus_r (0.0005713052 -0.1048075 0.0115706)
      PathWrap: wrap_object=deltoid
    Thelen2003Muscle delt_scap_2: max_isometric_force=211 optimal_fiber_length=0.0949 tendon_slack_length=0.076
        pennation_angle_at_optimal=0.08726646
      PathPoint P1: scapula_r (-0.06340201 -0.004682045 -0.03074478)
      PathPoint P2: scapula_r (-0.0541878 -0.0466692 -0.0155712)
      PathPoint P3: humerus_r (0.00417972 -0.09645 0.011915)
      PathWrap: wrap_object=deltoid
    Thelen2003Muscle delt_scap_3: max_isometric_force=446 optimal_fiber_length=0.0833 tendon_slack_length=0.062
        pennation_angle_at_optimal=0.08726646
      PathPoint P1: scapula_r (-0.04970237 -0.002457137 -0.005610517)
      PathPoint P2: humerus_r (-0.0199587 -0.0043804 -0.00344616)
      PathPoint P3: humerus_r (0.00417972 -0.09645 0.011915)
      PathWrap: wrap_object=deltoid
    Thelen2003Muscle delt_scap_4: max_isometric_force=117 optimal_fiber_length=0.0666 tendon_slack_length=0.045
        pennation_angle_at_optimal=0.08726646
      PathPoint P1: scapula_r (-0.04234182 -0.008336195 0.002399382)
      PathPoint P2: humerus_r (-0.0176295 -0.0027225 0.00689424)
      PathPoint P3: humerus_r (0.00541972 -0.08467 0.012075)
      PathWrap: wrap_object=deltoid
    Thelen2003Muscle delt_scap_5: max_isometric_force=120 optimal_fiber_length=0.0656 tendon_slack_length=0.035
        pennation_angle_at_optimal=0.08726646
      PathPoint P1: scapula_r (-0.0295073 -0.005419535 0.01182243)
      PathPoint P2: humerus_r (0.00879972 -0.07377634 0.013145)
      PathWrap: wrap_object=deltoid
    Thelen2003Muscle delt_scap_6: max_isometric_force=285 optimal_fiber_length=0.0767 tendon_slack_length=0.067
        pennation_angle_at_optimal=0.08726646
      PathPoint P1: scapula_r (-0.04020042 -0.002551036 0.004828647)
      PathPoint P2: humerus_r (0.00284972 -0.10894 0.012825)
      PathWrap: wrap_object=deltoid
    Thelen2003Muscle delt_scap_7: max_isometric_force=149 optimal_fiber_length=0.0754 tendon_slack_length=0.082
        pennation_angle_at_optimal=0.08726646
      PathPoint P1: scapula_r (-0.0364156 -0.005113805 0.01070173)
      PathPoint P2: humerus_r (0.004299716 -0.1316 0.012155)
      PathWrap: wrap_object=deltoid
    Thelen2003Muscle delt_scap_8: max_isometric_force=215 optimal_fiber_length=0.071 tendon_slack_length=0.065
        pennation_angle_at_optimal=0.08726646
      PathPoint P1: scapula_r (-0.02753274 -0.002379408 0.01047473)
      PathPoint P2: humerus_r (0.00284972 -0.10894 0.012825)
      PathWrap: wrap_object=deltoid
    Thelen2003Muscle delt_scap_9: max_isometric_force=286 optimal_fiber_length=0.0732 tendon_slack_length=0.071
        pennation_angle_at_optimal=0.08726646
      PathPoint P1: scapula_r (-0.02183232 -0.004518785 0.0094797)
      PathPoint P2: humerus_r (0.01439972 -0.11738 0.014835)
      PathWrap: wrap_object=deltoid
    Thelen2003Muscle delt_scap10: max_isometric_force=445 optimal_fiber_length=0.0748 tendon_slack_length=0.064
        pennation_angle_at_optimal=0.08726646
      PathPoint P1: scapula_r (-0.0126511 -0.004586979 0.01059341)
      PathPoint P2: humerus_r (0.01730394 -0.1094604 0.014665)
      PathWrap: wrap_object=deltoid
    Thelen2003Muscle delt_scap11: max_isometric_force=239 optimal_fiber_length=0.0737 tendon_slack_length=0.048
        pennation_angle_at_optimal=0.08726646
      PathPoint P1: scapula_r (-0.0008942115 -0.00636429 0.00570052)
      PathPoint P2: humerus_r (0.02275301 -0.09719311 0.0143532)
      PathWrap: wrap_object=deltoid
    Thelen2003Muscle delt_clav_1: max_isometric_force=128 optimal_fiber_length=0.0836 tendon_slack_length=0.062
        pennation_angle_at_optimal=0.08726646
      PathPoint P1: clavicle_r (-0.02470019 0.01855479 0.119176)
      PathPoint P2: humerus_r (0.02275301 -0.09719311 0.0143532)
      PathWrap pathwrap-1: wrap_object=delt_ant
    Thelen2003Muscle delt_clav_2: max_isometric_force=160 optimal_fiber_length=0.094 tendon_slack_length=0.088
        pennation_angle_at_optimal=0.08726646
      PathPoint P1: clavicle_r (-0.02035392 0.01828981 0.09919288)
      PathPoint P2: humerus_r (0.02054069 -0.1183424 0.01277083)
      PathWrap pathwrap-1: wrap_object=delt_ant
    Thelen2003Muscle delt_clav_3: max_isometric_force=105 optimal_fiber_length=0.0824 tendon_slack_length=0.067
        pennation_angle_at_optimal=0.08726646
      PathPoint P1: clavicle_r (-0.01909004 0.01611285 0.1057081)
      PathPoint P2: humerus_r (0.02262611 -0.104215 0.01334821)
      PathWrap pathwrap-1: wrap_object=delt_ant
    Thelen2003Muscle delt_clav_4: max_isometric_force=112 optimal_fiber_length=0.0991 tendon_slack_length=0.073
        pennation_angle_at_optimal=0.08726646
      PathPoint P1: clavicle_r (-0.0175212 0.01205567 0.1026736)
      PathPoint P2: humerus_r (0.02054069 -0.1183424 0.01277083)
      PathWrap pathwrap-1: wrap_object=delt_ant
    Thelen2003Muscle tric_long_1: max_isometric_force=223 optimal_fiber_length=0.1008 tendon_slack_length=0.2041
        pennation_angle_at_optimal=0.1745329
      PathPoint P1: ulna_r (-0.02326509 0.003876004 -0.005915874)
      PathPoint P2: scapula_r (-0.05181497 -0.05790836 -0.0181085)
      PathWrap: wrap_object=elbow
    Thelen2003Muscle tric_long_2: max_isometric_force=296 optimal_fiber_length=0.0881 tendon_slack_length=0.2193
        pennation_angle_at_optimal=0.1745329
      PathPoint P1: ulna_r (-0.02297798 0.01377156 0.003528567)
      PathPoint P2: scapula_r (-0.0275186 -0.05534161 -0.02052511)
      PathWrap: wrap_object=elbow
    Thelen2003Muscle tric_long_3: max_isometric_force=283 optimal_fiber_length=0.1183 tendon_slack_length=0.218
        pennation_angle_at_optimal=0.1745329
      PathPoint P1: ulna_r (-0.02870441 0.009541448 0.004022867)
      PathPoint P2: scapula_r (-0.04235109 -0.05110921 -0.01278281)
      PathWrap: wrap_object=elbow
    Thelen2003Muscle tric_long_4: max_isometric_force=327 optimal_fiber_length=0.1226 tendon_slack_length=0.2197
        pennation_angle_at_optimal=0
      PathPoint P1: ulna_r (-0.02515781 0.008703394 0.008066565)
      PathPoint P2: scapula_r (-0.0275186 -0.05534161 -0.02052511)
      PathWrap: wrap_object=elbow
    Thelen2003Muscle tric_med_1: max_isometric_force=263 optimal_fiber_length=0.0807 tendon_slack_length=0.0875
        pennation_angle_at_optimal=0.296706
      PathPoint P1: humerus_r (0.004785276 -0.1190375 -0.0070372)
      PathPoint P2: ulna_r (-0.03434926 -0.003322025 0.001167951)
      PathWrap: wrap_object=elbow
    Thelen2003Muscle tric_med_2: max_isometric_force=256 optimal_fiber_length=0.0773 tendon_slack_length=0.1122
        pennation_angle_at_optimal=0
      PathPoint P1: humerus_r (0.003870147 -0.1456587 -0.009539806)
      PathPoint P2: ulna_r (-0.03434926 -0.003322025 0.001167951)
      PathWrap: wrap_object=elbow
    Thelen2003Muscle tric_med_3: max_isometric_force=240 optimal_fiber_length=0.0602 tendon_slack_length=0.0107
        pennation_angle_at_optimal=0
      PathPoint P1: humerus_r (-0.003480074 -0.2420573 0.006131038)
      PathPoint P2: ulna_r (-0.03434926 -0.003322025 0.001167951)
      PathWrap: wrap_object=elbow
    Thelen2003Muscle tric_med_4: max_isometric_force=211 optimal_fiber_length=0.0746 tendon_slack_length=0.0404
        pennation_angle_at_optimal=0.1396263
      PathPoint P1: humerus_r (-0.002093265 -0.19989 0.001185331)
      PathPoint P2: ulna_r (-0.03434926 -0.003322025 0.001167951)
      PathWrap: wrap_object=elbow
    Thelen2003Muscle tric_med_5: max_isometric_force=107 optimal_fiber_length=0.0807 tendon_slack_length=0.0738
        pennation_angle_at_optimal=0
      PathPoint P1: humerus_r (-0.002254821 -0.1526764 -0.0053962)
      PathPoint P2: ulna_r (-0.03434926 -0.003322025 0.001167951)
      PathWrap: wrap_object=elbow
    Thelen2003Muscle tric_lat_1: max_isometric_force=153 optimal_fiber_length=0.0758 tendon_slack_length=0.1707
        pennation_angle_at_optimal=0
      PathPoint P1: humerus_r (-0.002030329 -0.06504134 0.004068515)
      PathPoint P2: ulna_r (-0.02665086 0.01210694 -0.003528463)
      PathWrap: wrap_object=elbow
    Thelen2003Muscle tric_lat_2: max_isometric_force=410 optimal_fiber_length=0.0766 tendon_slack_length=0.177
        pennation_angle_at_optimal=0.08726646
      PathPoint P1: humerus_r (-0.002030329 -0.06504134 0.004068515)
      PathPoint P2: ulna_r (-0.0278508 0.0095769 -0.00263846)
      PathWrap: wrap_object=elbow
    Thelen2003Muscle tric_lat_3: max_isometric_force=219 optimal_fiber_length=0.0656 tendon_slack_length=0.1911
        pennation_angle_at_optimal=0.1745329
      PathPoint P1: humerus_r (-0.002030329 -0.06504134 0.004068515)
      PathPoint P2: ulna_r (-0.0259008 0.0041769 0.00654154)
      PathWrap: wrap_object=elbow
    Thelen2003Muscle tric_lat_4: max_isometric_force=275 optimal_fiber_length=0.0638 tendon_slack_length=0.157
        pennation_angle_at_optimal=0.1745329
      PathPoint P1: humerus_r (0.002583983 -0.1033531 0.006317285)
      PathPoint P2: ulna_r (-0.0259008 0.0041769 0.00654154)
      PathWrap: wrap_object=elbow
    Thelen2003Muscle tric_lat_5: max_isometric_force=87 optimal_fiber_length=0.0638 tendon_slack_length=0.157
        pennation_angle_at_optimal=0.296706
      PathPoint P1: humerus_r (0.002583983 -0.1033531 0.006317285)
      PathPoint P2: ulna_r (-0.02721 0.0082369 0.00420154)
      PathWrap: wrap_object=elbow
    Thelen2003Muscle bic_l: max_isometric_force=347 optimal_fiber_length=0.1292 tendon_slack_length=0.2335
        pennation_angle_at_optimal=0
      PathPoint P1: scapula_r (-0.02477583 -0.02122581 -0.01240182)
      PathPoint P2: humerus_r (0.02346387 -0.005960594 0.006517655)
      PathPoint P3: radius_r (0.003543668 -0.032 -0.007)
      PathWrap: wrap_object=inf_sup_sub
      PathWrap pathwrap_0: wrap_object=elbow_circ
    Thelen2003Muscle bic_s: max_isometric_force=173 optimal_fiber_length=0.117 tendon_slack_length=0.1913
        pennation_angle_at_optimal=0
      PathPoint P1: scapula_r (0.01034834 -0.03746206 -0.02389202)
      PathPoint P2: radius_r (0.003543668 -0.032 -0.007)
      PathWrap: wrap_object=elbow_circ
    Thelen2003Muscle coracobr_1: max_isometric_force=201 optimal_fiber_length=0.066 tendon_slack_length=0.092
        pennation_angle_at_optimal=0
      PathPoint P1: scapula_r (0.004504278 -0.03404124 -0.02333062)
      PathPoint P2: humerus_r (0.01533729 -0.1542258 -0.004486911)
    Thelen2003Muscle coracobr_2: max_isometric_force=148 optimal_fiber_length=0.0683 tendon_slack_length=0.104
        pennation_angle_at_optimal=0
      PathPoint P1: scapula_r (0.005151845 -0.04227049 -0.02810935)
      PathPoint P2: humerus_r (0.01008221 -0.1742095 -0.006517584)
    Thelen2003Muscle coracobr_3: max_isometric_force=114 optimal_fiber_length=0.0727 tendon_slack_length=0.113
        pennation_angle_at_optimal=0
      PathPoint P1: scapula_r (0.01027667 -0.03505521 -0.02331086)
      PathPoint P2: humerus_r (0.01729802 -0.1824746 -0.008253526)
    Thelen2003Muscle brachialis_1: max_isometric_force=314 optimal_fiber_length=0.0876 tendon_slack_length=0.0807
        pennation_angle_at_optimal=0
      PathPoint P1: humerus_r (0.004059593 -0.1526255 0.007926382)
      PathPoint P2: ulna_r (-0.01354664 -0.03901236 -0.003371178)
      PathWrap: wrap_object=elbow_circ
    Thelen2003Muscle brachialis_2: max_isometric_force=158 optimal_fiber_length=0.0953 tendon_slack_length=0.0592
        pennation_angle_at_optimal=0
      PathPoint P1: humerus_r (0.01453025 -0.1602496 -0.003956686)
      PathPoint P2: ulna_r (-0.01602513 -0.03857375 -0.007941834)
      PathWrap: wrap_object=elbow_circ
    Thelen2003Muscle brachialis_3: max_isometric_force=157 optimal_fiber_length=0.087 tendon_slack_length=0.0394
        pennation_angle_at_optimal=0
      PathPoint P1: humerus_r (0.007199371 -0.188698 -0.006986979)
      PathPoint P2: ulna_r (-0.01495359 -0.02753959 -0.01280781)
      PathWrap: wrap_object=elbow_circ
    Thelen2003Muscle brachialis_4: max_isometric_force=87 optimal_fiber_length=0.0758 tendon_slack_length=0.0317
        pennation_angle_at_optimal=0
      PathPoint P1: humerus_r (0.01095676 -0.1978332 -0.002245731)
      PathPoint P2: ulna_r (-0.01590519 -0.03812187 -0.004173573)
      PathWrap: wrap_object=elbow_circ
    Thelen2003Muscle brachialis_5: max_isometric_force=101 optimal_fiber_length=0.0619 tendon_slack_length=0.0209
        pennation_angle_at_optimal=0
      PathPoint P1: humerus_r (0.007011171 -0.2275226 -0.006735896)
      PathPoint P2: ulna_r (-0.01743762 -0.03531149 -0.01073541)
      PathWrap: wrap_object=elbow_circ
    Thelen2003Muscle brachialis_6: max_isometric_force=104 optimal_fiber_length=0.0472 tendon_slack_length=0.035
        pennation_angle_at_optimal=0
      PathPoint P1: humerus_r (0.01092751 -0.22967 -0.00179514)
      PathPoint P2: ulna_r (-0.01620994 -0.02988505 -0.01339537)
      PathWrap: wrap_object=elbow_circ
    Thelen2003Muscle brachialis_7: max_isometric_force=118 optimal_fiber_length=0.0621 tendon_slack_length=0.0076
        pennation_angle_at_optimal=0
      PathPoint P1: humerus_r (0.006553556 -0.2425357 -0.009758524)
      PathPoint P2: ulna_r (-0.01422706 -0.03782449 1.835298e-5)
      PathWrap: wrap_object=elbow_circ
    Thelen2003Muscle brachiorad_1: max_isometric_force=30 optimal_fiber_length=0.1613 tendon_slack_length=0.1197
        pennation_angle_at_optimal=0
      PathPoint P1: humerus_r (0.003034397 -0.2165512 0.004271378)
      PathPoint P2: radius_r (-0.001 -0.224 0.032)
    Thelen2003Muscle brachiorad_2: max_isometric_force=82 optimal_fiber_length=0.1613 tendon_slack_length=0.1197
        pennation_angle_at_optimal=0
      PathPoint P1: humerus_r (-0.0002561463 -0.2346339 0.0043249)
      PathPoint P2: radius_r (-0.001 -0.224 0.032)
    Thelen2003Muscle brachiorad_3: max_isometric_force=52 optimal_fiber_length=0.1066 tendon_slack_length=0.1542
        pennation_angle_at_optimal=0
      PathPoint P1: humerus_r (7.991054e-5 -0.2487113 0.006244565)
      PathPoint P2: radius_r (-0.001 -0.224 0.032)
    Thelen2003Muscle pron_teres_1: max_isometric_force=510 optimal_fiber_length=0.061 tendon_slack_length=0.0851
        pennation_angle_at_optimal=0
      PathPoint P1: humerus_r (0.01272057 -0.2840464 -0.02569797)
      PathPoint P2: radius_r (0.001366283 -0.09409756 0.02123285)
      PathWrap: wrap_object=ulna_radius method=hybrid
    Thelen2003Muscle pron_teres_2: max_isometric_force=141 optimal_fiber_length=0.0391 tendon_slack_length=0.0484
        pennation_angle_at_optimal=0
      PathPoint P1: ulna_r (0.002526098 -0.003524385 -0.006049464)
      PathPoint P2: radius_r (0.001099879 -0.07652805 0.01926891)
      PathWrap: wrap_object=ulna_radius
    Thelen2003Muscle pron_quad_1: max_isometric_force=73 optimal_fiber_length=0.0377 tendon_slack_length=0.005
        pennation_angle_at_optimal=0
      PathPoint P1: radius_r (-0.003382183 -0.1951796 0.02160053)
      PathPoint P2: ulna_r (-0.02025875 -0.2073272 0.01832444)
    Thelen2003Muscle pron_quad_2: max_isometric_force=178 optimal_fiber_length=0.0386 tendon_slack_length=0.005
        pennation_angle_at_optimal=0
      PathPoint P1: radius_r (-0.003101176 -0.205007 0.02228421)
      PathPoint P2: ulna_r (-0.02103664 -0.2157292 0.02025689)
    Thelen2003Muscle pron_quad_3: max_isometric_force=219 optimal_fiber_length=0.0352 tendon_slack_length=0.005
        pennation_angle_at_optimal=0
      PathPoint P1: radius_r (-0.002138275 -0.2164831 0.02355373)
      PathPoint P2: ulna_r (-0.02046207 -0.2278356 0.02194115)
    Thelen2003Muscle anconeus_1: max_isometric_force=31 optimal_fiber_length=0.0252 tendon_slack_length=0.0064
        pennation_angle_at_optimal=0
      PathPoint P1: humerus_r (0.002299873 -0.2820824 0.01442546)
      PathPoint P2: ulna_r (-0.02837028 -0.02784974 0.01564964)
    Thelen2003Muscle anconeus_2: max_isometric_force=70 optimal_fiber_length=0.0202 tendon_slack_length=0.008
        pennation_angle_at_optimal=0.2617994
      PathPoint P1: humerus_r (0.004633847 -0.2849363 0.01262661)
      PathPoint P2: ulna_r (-0.03024051 -0.03140905 0.01681829)
    Thelen2003Muscle anconeus_3: max_isometric_force=25 optimal_fiber_length=0.0228 tendon_slack_length=0.0043
        pennation_angle_at_optimal=0
      PathPoint P1: humerus_r (0.002959427 -0.278005 0.01436673)
      PathPoint P2: ulna_r (-0.02783948 -0.02054533 0.01529055)
    Thelen2003Muscle anconeus_4: max_isometric_force=118 optimal_fiber_length=0.027 tendon_slack_length=0.03
        pennation_angle_at_optimal=0.3141593
      PathPoint P1: humerus_r (0.004881705 -0.2854418 0.02212419)
      PathPoint P2: ulna_r (-0.03438127 -0.06049653 0.02149589)
    Thelen2003Muscle anconeus_5: max_isometric_force=118 optimal_fiber_length=0.0266 tendon_slack_length=0.02
        pennation_angle_at_optimal=0.4014257
      PathPoint P1: humerus_r (0.003606484 -0.2843441 0.02075254)
      PathPoint P2: ulna_r (-0.0328031 -0.04506481 0.0209072)
    Thelen2003Muscle supinator_1: max_isometric_force=47 optimal_fiber_length=0.0267 tendon_slack_length=0.0254
        pennation_angle_at_optimal=0
      PathPoint P1: humerus_r (0.01255614 -0.2857112 0.02214551)
      PathPoint P2: radius_r (0.003152408 -0.03723377 0.005032545)
      PathWrap: wrap_object=supinator2
    Thelen2003Muscle supinator_2: max_isometric_force=148 optimal_fiber_length=0.0263 tendon_slack_length=0.0145
        pennation_angle_at_optimal=0
      PathPoint P1: humerus_r (0.007840662 -0.2850337 0.02074224)
      PathPoint P2: radius_r (0.001737549 -0.0436478 0.005685002)
      PathWrap: wrap_object=supinator3
    Thelen2003Muscle supinator_3: max_isometric_force=285 optimal_fiber_length=0.0274 tendon_slack_length=0.0139
        pennation_angle_at_optimal=0.03490659
      PathPoint P1: ulna_r (-0.0154749 -0.02730991 0.01968268)
      PathPoint P2: radius_r (0.005558091 -0.0560739 0.006978911)
      PathWrap: wrap_object=supinator
    Thelen2003Muscle supinator_4: max_isometric_force=126 optimal_fiber_length=0.0252 tendon_slack_length=0.015
        pennation_angle_at_optimal=0
      PathPoint P1: ulna_r (-0.01739868 -0.03724108 0.01984808)
      PathPoint P2: radius_r (0.005386614 -0.07011362 0.01156085)
      PathWrap: wrap_object=supinator
    Thelen2003Muscle supinator_5: max_isometric_force=232 optimal_fiber_length=0.026 tendon_slack_length=0.0231
        pennation_angle_at_optimal=0
      PathPoint P1: ulna_r (-0.01830921 -0.04828064 0.01478807)
      PathPoint P2: radius_r (0.005226477 -0.08431051 0.01429829)
      PathWrap: wrap_object=supinator
    Thelen2003Muscle trap_scap_1: max_isometric_force=118 optimal_fiber_length=0.1446 tendon_slack_length=0.003
        pennation_angle_at_optimal=0
      PathPoint P1: torso (-0.0493575 0.482401 0)
      PathPoint P2: scapula_r (-0.0344578 0.005287137 -0.01335434)
    Thelen2003Muscle trap_scap_2: max_isometric_force=168 optimal_fiber_length=0.1127 tendon_slack_length=0.027
        pennation_angle_at_optimal=0
      PathPoint P1: torso (-0.0505575 0.479501 0.0001)
      PathPoint P2: scapula_r (-0.0527478 0.00763481 -0.0225152)
    Thelen2003Muscle trap_scap_3: max_isometric_force=199 optimal_fiber_length=0.107 tendon_slack_length=0.054
        pennation_angle_at_optimal=0
      PathPoint P1: torso (-0.0530575 0.471501 0.0038)
      PathPoint P2: scapula_r (-0.0611691 0.001317177 -0.0383883)
    Thelen2003Muscle trap_scap_4: max_isometric_force=138 optimal_fiber_length=0.0952 tendon_slack_length=0.053
        pennation_angle_at_optimal=0
      PathPoint P1: torso (-0.0566575 0.466201 0.0044)
      PathPoint P2: scapula_r (-0.07032184 -0.0003220867 -0.04618208)
    Thelen2003Muscle trap_scap_5: max_isometric_force=122 optimal_fiber_length=0.0924 tendon_slack_length=0.035
        pennation_angle_at_optimal=0
      PathPoint P1: torso (-0.0602575 0.455101 0.005)
      PathPoint P2: scapula_r (-0.06886427 -0.0001861173 -0.06047379)
    Thelen2003Muscle trap_scap_6: max_isometric_force=101 optimal_fiber_length=0.0893 tendon_slack_length=0.033
        pennation_angle_at_optimal=0
      PathPoint P1: torso (-0.0715575 0.428801 0.0038)
      PathPoint P2: scapula_r (-0.0741678 -0.0004769346 -0.05025131)
    Thelen2003Muscle trap_scap_7: max_isometric_force=97 optimal_fiber_length=0.0868 tendon_slack_length=0.036
        pennation_angle_at_optimal=0
      PathPoint P1: torso (-0.0821575 0.395101 0.0065)
      PathPoint P2: scapula_r (-0.06886427 -0.0001861173 -0.06047379)
    Thelen2003Muscle trap_scap_8: max_isometric_force=138 optimal_fiber_length=0.077 tendon_slack_length=0.048
        pennation_angle_at_optimal=0
      PathPoint P1: torso (-0.0863575 0.366101 0.0118)
      PathPoint P2: scapula_r (-0.07651808 -0.002977323 -0.05813862)
    Thelen2003Muscle trap_scap_9: max_isometric_force=123 optimal_fiber_length=0.1011 tendon_slack_length=0.034
        pennation_angle_at_optimal=0
      PathPoint P1: torso (-0.0874575 0.318101 0.0147)
      PathPoint P2: scapula_r (-0.08244096 -0.009001399 -0.07892014)
    Thelen2003Muscle trap_scap10: max_isometric_force=81 optimal_fiber_length=0.1264 tendon_slack_length=0.035
        pennation_angle_at_optimal=0
      PathPoint P1: torso (-0.0892575 0.281101 0.0183)
      PathPoint P2: scapula_r (-0.08054655 -0.01154427 -0.07281754)
    Thelen2003Muscle trap_scap11: max_isometric_force=92 optimal_fiber_length=0.1355 tendon_slack_length=0.031
        pennation_angle_at_optimal=0
      PathPoint P1: torso (-0.0829575 0.249601 0.0216)
      PathPoint P2: scapula_r (-0.07742263 -0.01004892 -0.0644429)
    Thelen2003Muscle ter_min_1: max_isometric_force=122 optimal_fiber_length=0.0501 tendon_slack_length=0.049
        pennation_angle_at_optimal=0
      PathPoint P1: scapula_r (-0.07148657 -0.07121419 -0.03644207)
      PathPoint P2: humerus_r (0.005861355 -0.01350542 0.01715412)
      PathWrap: wrap_object=ter_min_cyl
    Thelen2003Muscle ter_min_2: max_isometric_force=195 optimal_fiber_length=0.055 tendon_slack_length=0.051
        pennation_angle_at_optimal=0
      PathPoint P1: scapula_r (-0.06885908 -0.06881485 -0.04327879)
      PathPoint P2: humerus_r (0.00816135 -0.0077154 0.0163541)
      PathWrap: wrap_object=ter_min_cyl
    Thelen2003Muscle ter_min_3: max_isometric_force=180 optimal_fiber_length=0.0506 tendon_slack_length=0.018
        pennation_angle_at_optimal=0
      PathPoint P1: scapula_r (-0.05551588 -0.05356441 -0.02278678)
      PathPoint P2: humerus_r (0.005861355 -0.01350542 0.01715412)
      PathWrap: wrap_object=ter_min_cyl
    Thelen2003Muscle ter_maj_1: max_isometric_force=165 optimal_fiber_length=0.1411 tendon_slack_length=0.006
        pennation_angle_at_optimal=0
      PathPoint P1: scapula_r (-0.08580312 -0.1068842 -0.06003626)
      PathPoint P2: humerus_r (0.0117516 -0.046557 -0.01098683)
      PathWrap: wrap_object=ter_lat_pec
    Thelen2003Muscle ter_maj_2: max_isometric_force=85 optimal_fiber_length=0.1595 tendon_slack_length=0.012
        pennation_angle_at_optimal=0
      PathPoint P1: scapula_r (-0.0957341 -0.1107579 -0.07595941)
      PathPoint P2: humerus_r (0.0118016 -0.065227 -0.00783683)
      PathWrap: wrap_object=ter_lat_pec
    Thelen2003Muscle ter_maj_3: max_isometric_force=200 optimal_fiber_length=0.1526 tendon_slack_length=0.015
        pennation_angle_at_optimal=0
      PathPoint P1: scapula_r (-0.0928359 -0.08581728 -0.06236695)
      PathPoint P2: humerus_r (0.01123163 -0.059377 -0.008776828)
      PathWrap: wrap_object=ter_lat_pec
    Thelen2003Muscle ter_maj_4: max_isometric_force=158 optimal_fiber_length=0.1093 tendon_slack_length=0.034
        pennation_angle_at_optimal=0
      PathPoint P1: scapula_r (-0.08342344 -0.09338415 -0.05623828)
      PathPoint P2: humerus_r (0.0130116 -0.030767 -0.01149683)
      PathWrap: wrap_object=ter_lat_pec
    Thelen2003Muscle supra_1: max_isometric_force=120 optimal_fiber_length=0.0541 tendon_slack_length=0.017
        pennation_angle_at_optimal=0
      PathPoint P1: scapula_r (-0.06646623 -0.0159076 -0.06794214)
      PathPoint P2: humerus_r (0.02354609 0.006303723 0.01054921)
      PathWrap: wrap_object=inf_sup_sub
    Thelen2003Muscle supra_2: max_isometric_force=113 optimal_fiber_length=0.0591 tendon_slack_length=0.025
        pennation_angle_at_optimal=0
      PathPoint P1: scapula_r (-0.06816797 -0.004173387 -0.08551856)
      PathPoint P2: humerus_r (0.02354609 0.006303723 0.01054921)
      PathWrap: wrap_object=inf_sup_sub
    Thelen2003Muscle supra_3: max_isometric_force=258 optimal_fiber_length=0.0564 tendon_slack_length=0.052
        pennation_angle_at_optimal=0
      PathPoint P1: scapula_r (-0.06328913 0.004625468 -0.08425267)
      PathPoint P2: humerus_r (0.02822441 0.006016287 0.006847973)
      PathWrap: wrap_object=inf_sup_sub
    Thelen2003Muscle supra_4: max_isometric_force=130 optimal_fiber_length=0.0554 tendon_slack_length=0.031
        pennation_angle_at_optimal=0
      PathPoint P1: scapula_r (-0.05315338 0.007015655 -0.07596011)
      PathPoint P2: humerus_r (0.02822441 0.006016287 0.006847973)
      PathWrap: wrap_object=inf_sup_sub
    Thelen2003Muscle infra_1: max_isometric_force=272 optimal_fiber_length=0.0633 tendon_slack_length=0.038
        pennation_angle_at_optimal=0
      PathPoint P1: scapula_r (-0.06894966 -0.05148125 -0.03825686)
      ConditionalPathPoint P3: scapula_r (-0.0555091 -0.0438419 -0.0225988)
          socket_coordinate=/jointset/acromial_r/arm_flex_r range=(0 3.14) [radians]
      PathPoint P2: humerus_r (0.0008017005 0.0084394 0.01207457)
      PathWrap: wrap_object=infra_cyl
    Thelen2003Muscle infra_2: max_isometric_force=275 optimal_fiber_length=0.0719 tendon_slack_length=0.107
        pennation_angle_at_optimal=0
      PathPoint P1: scapula_r (-0.1053127 -0.08486695 -0.08351463)
      ConditionalPathPoint P3: scapula_r (-0.0859322 -0.0617372 -0.0415752)
          socket_coordinate=/jointset/acromial_r/arm_flex_r range=(0 3.14)
      PathPoint P2: humerus_r (0.005232242 0.0146194 0.0126034)
      PathWrap: wrap_object=infra_cyl
    Thelen2003Muscle infra_3: max_isometric_force=194 optimal_fiber_length=0.0677 tendon_slack_length=0.084
        pennation_angle_at_optimal=0
      PathPoint P1: scapula_r (-0.09853345 -0.06828163 -0.07653244)
      ConditionalPathPoint P3: scapula_r (-0.0760965 -0.0512103 -0.0402293)
          socket_coordinate=/jointset/acromial_r/arm_flex_r range=(0 3.14)
      PathPoint P2: humerus_r (0.005232242 0.0146194 0.0126034)
      PathWrap: wrap_object=infra_cyl
    Thelen2003Muscle infra_4: max_isometric_force=207 optimal_fiber_length=0.0693 tendon_slack_length=0.071
        pennation_angle_at_optimal=0
      PathPoint P1: scapula_r (-0.09157947 -0.04631476 -0.07885719)
      ConditionalPathPoint P3: scapula_r (-0.0527897 -0.0371965 -0.0232298)
          socket_coordinate=/jointset/acromial_r/arm_flex_r range=(0 3.14)
      PathPoint P2: humerus_r (0.004748996 0.009627295 0.01297316)
      PathWrap: wrap_object=infra_cyl
    Thelen2003Muscle infra_5: max_isometric_force=302 optimal_fiber_length=0.0698 tendon_slack_length=0.05
        pennation_angle_at_optimal=0
      PathPoint P1: scapula_r (-0.08019709 -0.02505513 -0.08065633)
      ConditionalPathPoint P3: scapula_r (-0.0527897 -0.0249076 -0.0232298)
          socket_coordinate=/jointset/acromial_r/arm_flex_r range=(0 3.14)
      PathPoint P2: humerus_r (0.002554945 0.01394239 0.01441814)
      PathWrap: wrap_object=infra_cyl
    Thelen2003Muscle infra_6: max_isometric_force=182 optimal_fiber_length=0.0753 tendon_slack_length=0.035
        pennation_angle_at_optimal=0
      PathPoint P1: scapula_r (-0.07158911 -0.01579782 -0.05905608)
      ConditionalPathPoint P3: scapula_r (-0.0510759 -0.0222316 -0.0208786)
          socket_coordinate=/jointset/acromial_r/arm_flex_r range=(0 3.14)
      PathPoint P2: humerus_r (0.003782242 0.0113594 0.0134234)
      PathWrap: wrap_object=infra_cyl
    Thelen2003Muscle rhomboid_1: max_isometric_force=51 optimal_fiber_length=0.0986 tendon_slack_length=0.015
        pennation_angle_at_optimal=0
      PathPoint P1: torso (-0.06757234 0.4338824 0.0005064459)
      PathPoint P2: scapula_r (-0.07219726 -0.01818371 -0.08655778)
    Thelen2003Muscle rhomboid_2: max_isometric_force=92 optimal_fiber_length=0.1077 tendon_slack_length=0.066
        pennation_angle_at_optimal=0
      PathPoint P1: torso (-0.071118 0.4219695 0.00106222)
      PathPoint P2: scapula_r (-0.09679448 -0.08505983 -0.09318897)
    Thelen2003Muscle rhomboid_3: max_isometric_force=142 optimal_fiber_length=0.1259 tendon_slack_length=0.032
        pennation_angle_at_optimal=0
      PathPoint P1: torso (-0.07744571 0.4058506 0.01082971)
      PathPoint P2: scapula_r (-0.09667613 -0.08884217 -0.09178321)
    Thelen2003Muscle rhomboid_4: max_isometric_force=82 optimal_fiber_length=0.1267 tendon_slack_length=0.031
        pennation_angle_at_optimal=0
      PathPoint P1: torso (-0.08491737 0.3718096 0.003540398)
      PathPoint P2: scapula_r (-0.09968096 -0.09817458 -0.08879123)
    Thelen2003Muscle rhomboid_5: max_isometric_force=67 optimal_fiber_length=0.117 tendon_slack_length=0.04
        pennation_angle_at_optimal=0
      PathPoint P1: torso (-0.08687998 0.3409321 0.00591012)
      PathPoint P2: scapula_r (-0.1035169 -0.10446 -0.09098113)
    Thelen2003Muscle lev_scap_1: max_isometric_force=96 optimal_fiber_length=0.1578 tendon_slack_length=0.019
        pennation_angle_at_optimal=0
      PathPoint P1: torso (-0.0461895 0.5135078 0.03848802)
      PathPoint P2: scapula_r (-0.07365744 -0.008011091 -0.09476233)
    Thelen2003Muscle lev_scap_2: max_isometric_force=104 optimal_fiber_length=0.1302 tendon_slack_length=0.018
        pennation_angle_at_optimal=0
      PathPoint P1: torso (-0.04057993 0.4975193 0.02233167)
      PathPoint P2: scapula_r (-0.0639002 0.0008051885 -0.09351374)
    Thelen2003Muscle subscap_1: max_isometric_force=44 optimal_fiber_length=0.0556 tendon_slack_length=0.028
        pennation_angle_at_optimal=0
      PathPoint P1: scapula_r (-0.04943001 -0.02751697 -0.05805706)
      PathPoint P2: scapula_r (-0.03372402 -0.03518267 -0.03546722)
      PathPoint P3: humerus_r (0.02685607 0.00469361 -0.005706182)
      PathWrap: wrap_object=inf_sup_sub
    Thelen2003Muscle subscap_2: max_isometric_force=78 optimal_fiber_length=0.0649 tendon_slack_length=0.044
        pennation_angle_at_optimal=0
      PathPoint P1: scapula_r (-0.06561207 -0.01572428 -0.07933292)
      PathPoint P2: scapula_r (-0.03292194 -0.03468823 -0.03559098)
      PathPoint P3: humerus_r (0.02655241 0.006574859 -0.005570164)
      PathWrap: wrap_object=inf_sup_sub
    Thelen2003Muscle subscap_3: max_isometric_force=264 optimal_fiber_length=0.0676 tendon_slack_length=0.059
        pennation_angle_at_optimal=0.08726646
      PathPoint P1: scapula_r (-0.07292384 -0.02856721 -0.0829169)
      PathPoint P2: scapula_r (-0.0325594 -0.03622053 -0.03490756)
      PathPoint P3: humerus_r (0.02673674 0.002172365 -0.005771371)
      PathWrap: wrap_object=inf_sup_sub
    Thelen2003Muscle subscap_4: max_isometric_force=274 optimal_fiber_length=0.0744 tendon_slack_length=0.055
        pennation_angle_at_optimal=0.08726646
      PathPoint P1: scapula_r (-0.08075807 -0.04932286 -0.0710369)
      PathPoint P2: humerus_r (0.0265234 0.0036727 -0.00637907)
      PathWrap: wrap_object=inf_sup_sub
    Thelen2003Muscle subscap_5: max_isometric_force=114 optimal_fiber_length=0.0797 tendon_slack_length=0.066
        pennation_angle_at_optimal=0
      PathPoint P1: scapula_r (-0.07843208 -0.06090256 -0.06585691)
      PathPoint P2: humerus_r (0.0262234 0.0058327 -0.00238907)
      PathWrap: wrap_object=inf_sup_sub
    Thelen2003Muscle subscap_6: max_isometric_force=149 optimal_fiber_length=0.0762 tendon_slack_length=0.077
        pennation_angle_at_optimal=0
      PathPoint P1: scapula_r (-0.09444428 -0.08234781 -0.07797304)
      PathPoint P2: humerus_r (0.0296734 -0.0004473 -0.00495907)
      PathWrap: wrap_object=inf_sup_sub
    Thelen2003Muscle subscap_7: max_isometric_force=162 optimal_fiber_length=0.082 tendon_slack_length=0.079
        pennation_angle_at_optimal=0
      PathPoint P1: scapula_r (-0.09048117 -0.09466 -0.0702401)
      PathPoint P2: humerus_r (0.0282834 -0.0018673 -0.00916907)
      PathWrap: wrap_object=inf_sup_sub
    Thelen2003Muscle subscap_8: max_isometric_force=61 optimal_fiber_length=0.0765 tendon_slack_length=0.04
        pennation_angle_at_optimal=0
      PathPoint P1: scapula_r (-0.06979958 -0.07328619 -0.05176325)
      PathPoint P2: humerus_r (0.0282834 -0.0018673 -0.00916907)
      PathWrap: wrap_object=inf_sup_sub
    Thelen2003Muscle subscap_9: max_isometric_force=222 optimal_fiber_length=0.0721 tendon_slack_length=0.059
        pennation_angle_at_optimal=0
      PathPoint P1: scapula_r (-0.08228093 -0.0921 -0.05523912)
      PathPoint P2: humerus_r (0.0249534 -0.0064773 -0.01329907)
      PathWrap: wrap_object=inf_sup_sub
    Thelen2003Muscle subscap10: max_isometric_force=47 optimal_fiber_length=0.0676 tendon_slack_length=0.01
        pennation_angle_at_optimal=0
      PathPoint P1: scapula_r (-0.0609776 -0.06465688 -0.03371834)
      PathPoint P2: humerus_r (0.0171834 -0.0197773 -0.01413907)
      PathWrap: wrap_object=inf_sup_sub
    Thelen2003Muscle subscap11: max_isometric_force=16 optimal_fiber_length=0.0643 tendon_slack_length=0.01
        pennation_angle_at_optimal=0
      PathPoint P1: scapula_r (-0.04581956 -0.05743328 -0.02413653)
      PathPoint P2: humerus_r (0.0118934 -0.0255973 -0.01646907)
      PathWrap: wrap_object=inf_sup_sub
    Thelen2003Muscle pect_min_1: max_isometric_force=47 optimal_fiber_length=0.0765 tendon_slack_length=0.051
        pennation_angle_at_optimal=0
      PathPoint P1: torso (0.06027897 0.3107209 0.06418945)
      PathPoint P2: scapula_r (-0.003493411 -0.0261655 -0.04487797)
    Thelen2003Muscle pect_min_2: max_isometric_force=107 optimal_fiber_length=0.1086 tendon_slack_length=0.041
        pennation_angle_at_optimal=0
      PathPoint P1: torso (0.06978489 0.2824807 0.07560586)
      PathPoint P2: scapula_r (-0.003493411 -0.0261655 -0.04487797)
    Thelen2003Muscle pect_min_3: max_isometric_force=107 optimal_fiber_length=0.1075 tendon_slack_length=0.029
        pennation_angle_at_optimal=0
      PathPoint P1: torso (0.05747411 0.283741 0.1009599)
      PathPoint P2: scapula_r (0.002824874 -0.02967059 -0.04065797)
    Thelen2003Muscle pect_min_4: max_isometric_force=46 optimal_fiber_length=0.1381 tendon_slack_length=0.026
        pennation_angle_at_optimal=0
      PathPoint P1: torso (0.06000547 0.2599886 0.1037987)
      PathPoint P2: scapula_r (0.009984384 -0.03629406 -0.03222327)
    Thelen2003Muscle pect_maj_t_1: max_isometric_force=125 optimal_fiber_length=0.1884 tendon_slack_length=0.036
        pennation_angle_at_optimal=0
      PathPoint P1: torso (0.1004039 0.2174408 0.06435748)
      PathPoint P3: torso (0.0830439 0.244022 0.0960863)
      PathPoint P2: humerus_r (0.0232079 -0.05354845 -0.001387885)
      PathWrap: wrap_object=ter_lat_pec
      PathWrap pathwrap-1: wrap_object=Chest_pect
    Thelen2003Muscle pect_maj_t_2: max_isometric_force=118 optimal_fiber_length=0.183 tendon_slack_length=0.043
        pennation_angle_at_optimal=0
      PathPoint P1: torso (0.09238852 0.2430987 0.04511508)
      PathPoint P3: torso (0.0805344 0.257764 0.08680519)
      PathPoint P2: humerus_r (0.02342454 -0.05860357 0.0004211159)
      PathWrap: wrap_object=ter_lat_pec
      PathWrap pathwrap-1: wrap_object=Chest_pect
    Thelen2003Muscle pect_maj_t_3: max_isometric_force=165 optimal_fiber_length=0.1853 tendon_slack_length=0.053
        pennation_angle_at_optimal=0
      PathPoint P1: torso (0.088008 0.2550656 0.01567798)
      PathPoint P3: torso (0.07756087 0.273229 0.08402362)
      PathPoint P2: humerus_r (0.02211927 -0.06382882 0.0009770565)
      PathWrap: wrap_object=ter_lat_pec
      PathWrap pathwrap-1: wrap_object=Chest_pect
    Thelen2003Muscle pect_maj_t_4: max_isometric_force=157 optimal_fiber_length=0.1833 tendon_slack_length=0.028
        pennation_angle_at_optimal=0
      PathPoint P1: torso (0.07860491 0.2787991 0.01650606)
      PathPoint P3: torso (0.07374663 0.291674 0.07402711)
      PathPoint P2: humerus_r (0.0234579 -0.05472845 -0.0006278845)
      PathWrap: wrap_object=ter_lat_pec
      PathWrap pathwrap-1: wrap_object=Chest_pect
    Thelen2003Muscle pect_maj_t_5: max_isometric_force=133 optimal_fiber_length=0.15 tendon_slack_length=0.026
        pennation_angle_at_optimal=0
      PathPoint P1: torso (0.06239193 0.3368142 0.01265541)
      PathPoint P3: torso (0.06078775 0.333036 0.0609185)
      PathPoint P2: humerus_r (0.02417006 -0.04337874 -0.002665354)
      PathWrap: wrap_object=ter_lat_pec
      PathWrap pathwrap-1: wrap_object=Chest_pect
    Thelen2003Muscle pect_maj_t_6: max_isometric_force=198 optimal_fiber_length=0.1449 tendon_slack_length=0.036
        pennation_angle_at_optimal=0
      PathPoint P1: torso (0.04781432 0.355279 0.02221263)
      PathPoint P3: torso (0.05445233 0.347677 0.0558677)
      PathPoint P2: humerus_r (0.0234579 -0.05472845 -0.0006278845)
      PathWrap: wrap_object=ter_lat_pec
      PathWrap pathwrap-1: wrap_object=Chest_pect
    Thelen2003Muscle pect_maj_c_1: max_isometric_force=179 optimal_fiber_length=0.1363 tendon_slack_length=0.017
        pennation_angle_at_optimal=0
      PathPoint P1: clavicle_r (0.01669934 -0.005766628 0.03183592)
      PathPoint P3: clavicle_r (-0.00576999 0.0244127 0.0585089)
      PathPoint P2: humerus_r (0.02229033 -0.07913284 0.002385813)
      PathWrap: wrap_object=ter_lat_pec
      PathWrap pathwrap-1: wrap_object=Chest_pect
    Thelen2003Muscle pect_maj_c_2: max_isometric_force=113 optimal_fiber_length=0.1091 tendon_slack_length=0.014
        pennation_angle_at_optimal=0
      PathPoint P1: clavicle_r (0.007075043 -0.008996815 0.06197742)
      PathPoint P3: clavicle_r (-0.00583906 0.0232446 0.0707512)
      PathPoint P2: humerus_r (0.02229033 -0.07052724 0.002385813)
      PathWrap: wrap_object=ter_lat_pec
      PathWrap pathwrap-1: wrap_object=Chest_pect
    Thelen2003Muscle LD_L1_r: max_isometric_force=41.4 optimal_fiber_length=0.316063 tendon_slack_length=0.0692329
        pennation_angle_at_optimal=0
      PathPoint P1: lumbar1 (-0.045 -0.013 0.00433164)
      PathPoint P2: humerus_r (-0.00948737 -0.0152526 0.00268873)
      PathWrap: wrap_object=Chest_r method=hybrid
    Thelen2003Muscle LD_L2_r: max_isometric_force=41.4 optimal_fiber_length=0.338256 tendon_slack_length=0.0740942
        pennation_angle_at_optimal=0
      PathPoint P1: lumbar2 (-0.043 -0.0134148 0.00414584)
      PathPoint P2: humerus_r (-0.00949 -0.01525 0.00269)
      PathWrap: wrap_object=Chest_r method=hybrid
    Thelen2003Muscle LD_L3_r: max_isometric_force=50.6 optimal_fiber_length=0.3550696 tendon_slack_length=0.077777
        pennation_angle_at_optimal=0
      PathPoint P1: lumbar3 (-0.046 -0.004 0.00385971)
      PathPoint P2: humerus_r (-0.00949 -0.01525 0.00433)
      PathWrap: wrap_object=Chest_r method=hybrid
    Thelen2003Muscle LD_L4_r: max_isometric_force=50.6 optimal_fiber_length=0.3719192 tendon_slack_length=0.081468
        pennation_angle_at_optimal=0
      PathPoint P1: lumbar4 (-0.045 0.005 0.00462278)
      PathPoint P2: humerus_r (-0.00949 -0.01525 0.00269)
      PathWrap: wrap_object=Chest_r method=hybrid
    Thelen2003Muscle LD_L5_r: max_isometric_force=50.6 optimal_fiber_length=0.3902216 tendon_slack_length=0.080135
        pennation_angle_at_optimal=0
      PathPoint P1: lumbar5 (-0.036 0.021 0.00411073)
      PathPoint P2: humerus_r (-0.00949 -0.01525 0.00269)
      PathWrap: wrap_object=Chest_r method=hybrid
    Thelen2003Muscle LD_T12_r: max_isometric_force=23 optimal_fiber_length=0.3032209 tendon_slack_length=0.06226857
        pennation_angle_at_optimal=0
      PathPoint P1: humerus_r (-0.00949 -0.01525 0.00269)
      PathPoint P2: torso (-0.052 0.102 0.0043635)
      PathWrap: wrap_object=Chest_r method=hybrid range=(1 2)
    Thelen2003Muscle LD_T11_r: max_isometric_force=27.6 optimal_fiber_length=0.2848084 tendon_slack_length=0.058487
        pennation_angle_at_optimal=0
      PathPoint P1: humerus_r (-0.00949 -0.01525 0.00269)
      PathPoint P2: torso (-0.0631214 0.131 0.003)
      PathWrap: wrap_object=Chest_r method=hybrid
    Thelen2003Muscle LD_T10_r: max_isometric_force=27.6 optimal_fiber_length=0.279701 tendon_slack_length=0.0437628
        pennation_angle_at_optimal=0
      PathPoint P1: humerus_r (-0.00949 -0.01525 0.00269)
      PathPoint P2: torso (-0.069 0.158 0.00382991)
      PathWrap: wrap_object=Chest_r method=hybrid
    Thelen2003Muscle LD_T9_r: max_isometric_force=18.4 optimal_fiber_length=0.256967 tendon_slack_length=0.14
        pennation_angle_at_optimal=0
      PathPoint P1: humerus_r (-0.00949 -0.01525 0.00269)
      PathPoint P2: torso (-0.079 0.194 0.00407649)
      PathWrap: wrap_object=Chest_r method=hybrid
    Thelen2003Muscle LD_T8_r: max_isometric_force=18.4 optimal_fiber_length=0.232514 tendon_slack_length=0.0477484
        pennation_angle_at_optimal=0
      PathPoint P1: humerus_r (-0.00949 -0.01525 0.00269)
      PathPoint P2: torso (-0.081 0.215 0.00427544)
      PathWrap: wrap_object=Chest_r method=hybrid
    Thelen2003Muscle LD_T7_r: max_isometric_force=18.4 optimal_fiber_length=0.223761 tendon_slack_length=0.045951
        pennation_angle_at_optimal=0
      PathPoint P1: humerus_r (-0.00949 -0.01525 0.00269)
      PathPoint P2: torso (-0.09 0.235 0.00407354)
      PathWrap: wrap_object=Chest_r method=hybrid
    Thelen2003Muscle LD_R12_r: max_isometric_force=18.4 optimal_fiber_length=0.2444749 tendon_slack_length=0.0502047
        pennation_angle_at_optimal=0
      PathPoint P1: humerus_r (-0.00949 -0.01525 0.00269)
      PathPoint P2: torso (-0.045 0.121579 0.0442662)
    Thelen2003Muscle LD_R11_r: max_isometric_force=27.6 optimal_fiber_length=0.240735 tendon_slack_length=0.0494366
        pennation_angle_at_optimal=0
      PathPoint P1: humerus_r (-0.00949 -0.01525 0.00433)
      PathPoint P2: torso (-0.068 0.14 0.063)
      PathWrap: wrap_object=Chest_r method=hybrid
    ObjectGroup subscap: members=(subscap10 subscap11 subscap_1 subscap_2 subscap_3 subscap_4 subscap_5 subscap_6 subscap_7 subscap_8 subscap_9)
    ObjectGroup delt_scap: members=(delt_scap10 delt_scap11 delt_scap_1 delt_scap_2 delt_scap_3 delt_scap_4 delt_scap_5 delt_scap_6 delt_scap_7 delt_scap_8 delt_scap_9)
    ObjectGroup delt_clav: members=(delt_clav_1 delt_clav_2 delt_clav_3 delt_clav_4)
    ObjectGroup infra: members=(infra_1 infra_2 infra_3 infra_4 infra_5 infra_6)
    ObjectGroup supra: members=(supra_1 supra_2 supra_3 supra_4)
    ObjectGroup trap_scap: members=(trap_scap10 trap_scap11 trap_scap_1 trap_scap_2 trap_scap_3 trap_scap_4 trap_scap_5 trap_scap_6 trap_scap_7 trap_scap_8 trap_scap_9)
    ObjectGroup trap_clav
    ObjectGroup lev_scap: members=(lev_scap_1 lev_scap_2)
    ObjectGroup ter_min: members=(ter_min_1 ter_min_2 ter_min_3)
    ObjectGroup ter_maj: members=(ter_maj_1 ter_maj_2 ter_maj_3 ter_maj_4)
    ObjectGroup pect_min: members=(pect_min_1 pect_min_2 pect_min_3 pect_min_4)
    ObjectGroup rhomboid: members=(rhomboid_1 rhomboid_2 rhomboid_3 rhomboid_4 rhomboid_5)
    ObjectGroup bic: members=(bic_s bic_l)
    ObjectGroup tric_long: members=(tric_long_1 tric_long_2 tric_long_3 tric_long_4)
    ObjectGroup pect_maj_t: members=(pect_maj_t_1 pect_maj_t_2 pect_maj_t_3 pect_maj_t_4 pect_maj_t_5 pect_maj_t_6)
    ObjectGroup pect_maj_c: members=(pect_maj_c_1 pect_maj_c_2)
    ObjectGroup tric_med: members=(tric_med_1 tric_med_2 tric_med_3 tric_med_4 tric_med_5)
    ObjectGroup brachialis: members=(brachialis_1 brachialis_2 brachialis_3 brachialis_4 brachialis_5 brachialis_6 brachialis_7)
    ObjectGroup brachiorad: members=(brachiorad_1 brachiorad_2 brachiorad_3)
    ObjectGroup pron_teres_hr: members=pron_teres_1
    ObjectGroup pron_teres_ur: members=pron_teres_2
    ObjectGroup supinator_ur: members=(supinator_1 supinator_2 supinator_3 supinator_4 supinator_5)
    ObjectGroup pron_quad: members=(pron_quad_1 pron_quad_2 pron_quad_3)
    ObjectGroup tric_lat: members=(tric_lat_1 tric_lat_2 tric_lat_3 tric_lat_4 tric_lat_5)
    ObjectGroup anconeus: members=(anconeus_1 anconeus_2 anconeus_3 anconeus_4 anconeus_5)
