# OpenSim document version 40500
ControlSet BUET_simplified:
  ControlLinear [values shared by the 8 below unless stated]: is_model_control=true extrapolate=true default_min=-10000
      default_max=10000 filter_on=false use_steps=false kp=100 kv=20
  ControlLinear SC_y_reserve.excitation:
    x_nodes:
      ControlLinearNode: t=0.03000001 value=0
      ControlLinearNode: t=0.04 value=0
      ControlLinearNode: t=0.05 value=0
  ControlLinear SC_z_reserve.excitation:
    x_nodes:
      ControlLinearNode: t=0.03000001 value=0
      ControlLinearNode: t=0.04 value=0
      ControlLinearNode: t=0.05 value=0
  ControlLinear SC_x_reserve.excitation:
    x_nodes:
      ControlLinearNode: t=0.03000001 value=0
      ControlLinearNode: t=0.04 value=0
      ControlLinearNode: t=0.05 value=0
  ControlLinear arm_flex_r_reserve.excitation:
    x_nodes:
      ControlLinearNode: t=0.03000001 value=3.13484e-5
      ControlLinearNode: t=0.04 value=3.13484e-5
      ControlLinearNode: t=0.05 value=3.13484e-5
  ControlLinear arm_add_r_reserve.excitation:
    x_nodes:
      ControlLinearNode: t=0.03000001 value=-8.343615e-6
      ControlLinearNode: t=0.04 value=-8.343615e-6
      ControlLinearNode: t=0.05 value=-8.343615e-6
  ControlLinear arm_rot_r_reserve.excitation:
    x_nodes:
      ControlLinearNode: t=0.03000001 value=-5.443593e-6
      ControlLinearNode: t=0.04 value=-5.443593e-6
      ControlLinearNode: t=0.05 value=-5.443593e-6
  ControlLinear elbow_flex_r_reserve.excitation:
    x_nodes:
      ControlLinearNode: t=0.03000001 value=2.877843e-5
      ControlLinearNode: t=0.04 value=2.877843e-5
      ControlLinearNode: t=0.05 value=2.877843e-5
  ControlLinear pro_sup_r_reserve.excitation:
    x_nodes:
      ControlLinearNode: t=0.03000001 value=0
      ControlLinearNode: t=0.04 value=0
      ControlLinearNode: t=0.05 value=0
