# OpenSim document version 40500
CMC_TaskSet:
  CMC_Joint arm_flex_r: weight=(1 1 1) active=(true false false) kp=(1 1 1) kv=(0.5 0.5 0.5) ka=(1 1 1) r0=(0 0 0)
      r1=(0 0 0) r2=(0 0 0) coordinate=arm_flex_r limit=0
  CMC_Joint arm_add_r: weight=(1 1 1) active=(true false false) kp=(1 1 1) kv=(0.5 0.5 0.5) ka=(1 1 1) r0=(0 0 0)
      r1=(0 0 0) r2=(0 0 0) coordinate=arm_add_r limit=0
  CMC_Joint arm_rot_r: weight=(1 1 1) active=(true false false) kp=(1 1 1) kv=(0.5 0.5 0.5) ka=(1 1 1) r0=(0 0 0)
      r1=(0 0 0) r2=(0 0 0) coordinate=arm_rot_r limit=0
  CMC_Joint elbow_flex_r: weight=(1 1 1) active=(true false false) kp=(1 1 1) kv=(0.5 0.5 0.5) ka=(1 1 1) r0=(0 0 0)
      r1=(0 0 0) r2=(0 0 0) coordinate=elbow_flex_r limit=0
