# OpenSim document version 40500
CMC_TaskSet:
  CMC_Joint elv_angle: weight=(1 1 1) active=(true false false) kp=(100 100 100) kv=(20 20 20) ka=(1 1 1) r0=(0 0 0)
      r1=(0 0 0) r2=(0 0 0) coordinate=elv_angle limit=0
  CMC_Joint shoulder_elv: weight=(1 1 1) active=(true false false) kp=(100 100 100) kv=(20 20 20) ka=(1 1 1) r0=(0 0 0)
      r1=(0 0 0) r2=(0 0 0) coordinate=shoulder_elv limit=0
  CMC_Joint shoulder_rot: weight=(1 1 1) active=(true false false) kp=(100 100 100) kv=(20 20 20) ka=(1 1 1) r0=(0 0 0)
      r1=(0 0 0) r2=(0 0 0) coordinate=shoulder_rot limit=0
  CMC_Joint elbow_flexion: weight=(1 1 1) active=(true false false) kp=(100 100 100) kv=(20 20 20) ka=(1 1 1)
      r0=(0 0 0) r1=(0 0 0) r2=(0 0 0) coordinate=elbow_flexion limit=0
