# OpenSim document version 40500
CMC_TaskSet:
  CMC_Joint GH_y: weight=(1 1 1) active=(true false false) kp=(100 100 100) kv=(20 20 20) ka=(1 1 1) r0=(0 0 0)
      r1=(0 0 0) r2=(0 0 0) coordinate=GH_y limit=0
  CMC_Joint GH_z: weight=(1 1 1) active=(true false false) kp=(100 100 100) kv=(20 20 20) ka=(1 1 1) r0=(0 0 0)
      r1=(0 0 0) r2=(0 0 0) coordinate=GH_z limit=0
  CMC_Joint GH_yy: weight=(1 1 1) active=(true false false) kp=(100 100 100) kv=(20 20 20) ka=(1 1 1) r0=(0 0 0)
      r1=(0 0 0) r2=(0 0 0) coordinate=GH_yy limit=0
  CMC_Joint EL_x: weight=(1 1 1) active=(true false false) kp=(100 100 100) kv=(20 20 20) ka=(1 1 1) r0=(0 0 0)
      r1=(0 0 0) r2=(0 0 0) coordinate=EL_x limit=0
