# OpenSim document version 40500
ScaleTool das3_scaled:
  mass: 70
  height: 1700
  age: 22
  notes: setup file for scaling das3
  GenericModelMaker:
    model_file: das3.osim
  ModelScaler:
    apply: true
    scaling_order: manualScale
    preserve_mass_distribution: true
    output_model_file: das3_scaled.osim
    output_scale_file: Scale_files\das3_scaleSet_applied.xml
    ScaleSet:
      Scale: scales=(1.1 1.1 1.1) segment=bone apply=true
      Scale: scales=(1.1 1.1 1.1) segment=bone2 apply=true
