# OpenSim document version 40500
ForwardTool:
  model_file: ../test_simple.osim
  replace_force_set: false
  results_directory: \results
  output_precision: 8
  initial_time: 0.03
  final_time: 9.99
  solve_for_equilibrium_for_auxiliary_states: false
  maximum_number_of_integrator_steps: 20000
  maximum_integrator_step_size: 1
  minimum_integrator_step_size: 1e-8
  integrator_error_tolerance: 1e-5
  states_file: ../CMC\Results\model_CMCed_states.sto
  use_specified_dt: true
  ControllerSet Controllers:
    ControlSetController: controls_file=../CMC\Results\model_CMCed_controls.xml
