# OpenSim document version 40500
ScaleTool ToyLandingModel_scaled:
  mass: 70 [kg]
  height: 1750.4
  age: 99
  notes: This is a test setup file to experiment  with manual scaling
  GenericModelMaker:
    model_file: ToyLandingModel.osim
  ModelScaler:
    apply: true
    scaling_order: manualScale
    preserve_mass_distribution: true
    output_model_file: ToyLandingModel_scaled.osim
    output_scale_file: ToyLandingModel_scaleSet_applied.xml
    ScaleSet ToyLandingModel_scale:
      Scale: scales=(1.1 1.1 1.1) segment=pelvis apply=true
      Scale: scales=(1.1 1.1 1.1) segment=femur_r apply=true
      Scale: scales=(1.1 1.1 1.1) segment=femur_l apply=true
      Scale: scales=(1.1 1.1 1.1) segment=tibia_r apply=true
      Scale: scales=(1.1 1.1 1.1) segment=tibia_l apply=true
      Scale: scales=(1.1 1.1 1.1) segment=talus_r apply=true
      Scale: scales=(1.1 1.1 1.1) segment=talus_l apply=true
      Scale: scales=(1.1 1.1 1.1) segment=calcn_r apply=true
      Scale: scales=(1.1 1.1 1.1) segment=calcn_l apply=true
      Scale: scales=(1.1 1.1 1.1) segment=toes_r apply=true
      Scale: scales=(1.1 1.1 1.1) segment=toes_l apply=true
      Scale: scales=(1.1 1.1 1.1) segment=torso apply=true
